// COMSOL Multiphysics 5.4.0.346 model "2DElasticEllip_17Jun19.mph"
// Outline of the model tree

Parameters
  r_dist = 50 [km]  // model space radius
  z_dist = 50 [km]  // model space depth
  r1 = 1000 [m]  // reservoir half height
  r2 = 2000 [m]  // reservoir half width
  dP = 100 [MPa]  // reservoir overpressure
  dZ = 4 [km]  // depth to reservoir center
  E = 75 [GPa]  // Youngs modulus
  nu = 0.25  // Poissons ratio
  G = E/(2*(1+nu))  // shear modulus
  K = E/(3*(1-2*nu))  // bulk modulus
  rhor = 2500 [kg/m^3]  // host rock density
  g = 9.81 [m/s^2]  // gravity
  aif = 25 [deg]  // MC angle of internal friction

Variables
  var1 "Variables 1"
    MagmaLd = dP + rhor*g*-z  // Magma load on reservoir wall
    beta = (z + dZ) / r1
    alpha = atan((z+dZ)/r)
    tau = (solid.sp3-solid.sp1)/2 * cos(aif)  // shear stress of MC plane
    sigma = (solid.sp3+solid.sp1)/2 - (solid.sp3-solid.sp1)/2 * sin(aif)  // normal stress of MC plane
    MCFail = abs(tau) - (abs(sigma) * tan(aif))  // MC failure if > Cohesion
    sigmaX = (cos((aif+pi/2)/2))^2*solid.sp3+(cos((aif-pi/2)/2)^2)*solid.sp1  // long for sigma
    tauX = sqrt(((cos((aif-pi/2)/2)*cos((aif+pi/2)/2))^2)*(solid.sp3-solid.sp1)^2)  // long form tau
    MCFailX = abs(tauX) - (abs(sigmaX) * tan(aif))

Geometry
  geom1 "Geometry 1" (2D axisymmetric, length unit m)
    r1: Rectangle | pos = {0, -z_dist}; size = {r_dist, z_dist}
    e1: Ellipse | pos = {0, -dZ}; semiaxes = {r2, r1}
    r2: Rectangle | pos = {0, -dZ-r1-500}; size = {2*r2, dZ+r1+500}
    dif1: Difference | input = r1, r2; input2 = e1
    ls1: LineSegment | vertex1 = dif1(1) points 5; specify2 = coord; coord2 = {25000, 0}
    fin: Finalize "Form Union"

Physics
  solid: SolidMechanics on all domains
    dependent variable u = {u, v, w}
    ShapeProperty.order_displacement = 2
    lemm1: LinearElasticModel "Linear Elastic Material 1" (default)
      IsotropicOption = KG
      E_mat = userdef
      E = 0
      K_mat = userdef
      K = K
      G_mat = userdef
      G = G
      rho_mat = userdef
      rho = rhor
      iss1: InitialStressandStrain on all domains | Sil = rhor*g*z
    axi1: AxialSymmetrySolid "Axial Symmetry 1" (default)
    free1: Free (default)
    init1: init "Initial Values 1" (default)
    roll1: Roller on boundaries 2, 10
    bndl1: BoundaryLoad on boundaries 11, 12 | LoadType = FollowerPressure; FollowerPressure = MagmaLd
    gr1: Gravity on domains 1, 2 | g = {0, 0, -g}

Mesh
  mesh1 "Mesh 1"
    size: MeshSizeDefault | hmax = 3350
    size1: Size on boundaries 11, 12 | hmax = 75; hauto = 1; custom = on
    size2: Size on boundaries 5, 6, 8 | hmax = 300; hauto = 1; custom = on
    ftri1: FreeTri "Free Triangular 1" on remaining entities

Studies
  std1 "Study 1"
    param: Parametric "Parametric Sweep" (disabled)
      pname = {r2, r1, dZ, dP}
      plistarr = {"500, 750, 1000", "500, 1000, 750", "6000, 4000, 3000", "100e6, 100e6, 100e6"}
      punit = {m, m, m, Pa}
      keepsol = all
    stat: Stationary

Solver configurations
  sol1 "Solution 1" (study std1)
    v1: Variables "Dependent Variables 1"
    s1: Stationary "Stationary Solver 1"
      dDef: Direct
      fc1: FullyCoupled | linsolver = dDef
  sol6 "Parametric Solutions 2" (study std1)

Datasets
  dset1: Solution | solution = sol1
  rev1: Revolve2D "Revolution 2D 1" | data = dset1; startangle = -90; revangle = 225
  dset2: Solution | solution = sol6
  rev2: Revolve2D "Revolution 2D 2" | data = dset2; startangle = -90; revangle = 225

Plots
  pg7: PlotGroup2D "Stress (solid)" | data = dset2
    surf1: Surface | expr = meshvol; descr = Element volume
  pg6: PlotGroup1D "1D Plot Group 6" | data = dset2
    lngr1: LineGraph on boundaries 11, 12 | expr = alpha; unit = °; xdata = expr; xdataexpr = solid.sp1z
  pg8: PlotGroup3D "Stress, 3D (solid)" | data = rev2
    surf1: Surface | expr = solid.mises
      def: Deform "Deformation"
        revcoordsys = cylindrical
        expr = {u, 0, w}
        descr = Displacement field (material and geometry frames)
  pg9: PlotGroup2D "Stress (solid) 1" | data = dset1
    surf1: Surface | expr = solid.mises
      def: Deform "Deformation" | expr = {u, w}; descr = Displacement field (material and geometry frames)
  pg10: PlotGroup3D "Stress, 3D (solid) 1" | data = rev1
    surf1: Surface | expr = solid.mises
      def: Deform "Deformation"
        revcoordsys = cylindrical
        expr = {u, 0, w}
        descr = Displacement field (material and geometry frames)
  pg11: PlotGroup1D "1D Plot Group 11" | data = dset1
    lngr1: LineGraph | expr = z; xdata = expr; xdataexpr = solid.sp1